<Node name="root"  gravity="0 -100 0" dt="0.04">
	<VisualStyle displayFlags="showBehaviorModels showForceFields" />
	<Node name="M1">
        <MeshVTKLoader name="volume" filename="../mesh_pipeline/output_files_dir/output_files_demo_reference/out_edited.vtu" onlyAttachedPoints="false" />
		<EulerImplicitSolver rayleighMass="0.01" rayleighStiffness="0.01" />
		<CGLinearSolver iterations="25" tolerance="1e-6" threshold="1e-20"/>
		<MeshTopology src="@volume" />
		<MechanicalObject template="Vec3" />
		<UniformMass vertexMass="0.1" />
        <!--Note: local stiffnesses have been created from the partion numbers in the .vtu file, with find-replace 4->40. This produces one lobe that is clearly stiffer than the rest of the structure. See Screenshot _paraview_partitions.png , the red lobe is partition 4, with local stiffness factor 40 -->
		<TetrahedronFEMForceField name="FEM" youngModulus="100" poissonRatio="0.4" listening="true"
           localStiffnessFactor="2 1 1 2 3 2 2 3 3 2 1 40 40 1 1 1 1 2 1 1 2 2 1 1 1 1 2 40 2 1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"
                            />
		<PlaneForceField normal="0 1 0" d="-20.2" stiffness="1000"  showPlane="1" showPlaneSize="100" />
  </Node>
</Node>
